<?xml version="1.0" ?>
<Node name="root" dt="0.03" showBoundingTree="0" gravity="0 -0.9 0">
    <Node name="RequiredPlugins">
        <RequiredPlugin name="Sofa.Component.Collision.Detection.Algorithm"/> <!-- Needed to use components [BVHNarrowPhase, BruteForceBroadPhase, CollisionPipeline] -->
        <RequiredPlugin name="Sofa.Component.Collision.Detection.Intersection"/> <!-- Needed to use components [MinProximityIntersection] -->
        <RequiredPlugin name="Sofa.Component.Collision.Geometry"/> <!-- Needed to use components [PointCollisionModel, SphereCollisionModel, TriangleCollisionModel] -->
        <RequiredPlugin name="Sofa.Component.Collision.Response.Contact"/> <!-- Needed to use components [DefaultContactManager] -->
        <RequiredPlugin name="Sofa.Component.Constraint.Projective"/> <!-- Needed to use components [FixedConstraint] -->
        <RequiredPlugin name="Sofa.Component.Engine.Select"/> <!-- Needed to use components [BoxROI] -->
        <RequiredPlugin name="Sofa.Component.IO.Mesh"/> <!-- Needed to use components [MeshOBJLoader] -->
        <RequiredPlugin name="Sofa.Component.LinearSolver.Iterative"/> <!-- Needed to use components [CGLinearSolver] -->
        <RequiredPlugin name="Sofa.Component.Mapping.Linear"/> <!-- Needed to use components [IdentityMapping] -->
        <RequiredPlugin name="Sofa.Component.Mapping.NonLinear"/> <!-- Needed to use components [RigidMapping] -->
        <RequiredPlugin name="Sofa.Component.Mass"/> <!-- Needed to use components [DiagonalMass, UniformMass] -->
        <RequiredPlugin name="Sofa.Component.ODESolver.Backward"/> <!-- Needed to use components [EulerImplicitSolver] -->
        <RequiredPlugin name="Sofa.Component.SceneUtility"/> <!-- Needed to use components [InfoComponent] -->
        <RequiredPlugin name="Sofa.Component.SolidMechanics.FEM.Elastic"/> <!-- Needed to use components [TetrahedralCorotationalFEMForceField] -->
        <RequiredPlugin name="Sofa.Component.StateContainer"/> <!-- Needed to use components [MechanicalObject] -->
        <RequiredPlugin name="Sofa.Component.Topology.Container.Dynamic"/> <!-- Needed to use components [TetrahedronSetGeometryAlgorithms, TetrahedronSetTopologyContainer, TetrahedronSetTopologyModifier, TriangleSetGeometryAlgorithms, TriangleSetTopologyContainer, TriangleSetTopologyModifier] -->
        <RequiredPlugin name="Sofa.Component.Topology.Container.Grid"/> <!-- Needed to use components [RegularGridTopology] -->
        <RequiredPlugin name="Sofa.Component.Topology.Mapping"/> <!-- Needed to use components [Hexa2TetraTopologicalMapping, Tetra2TriangleTopologicalMapping] -->
        <RequiredPlugin name="Sofa.Component.Visual"/> <!-- Needed to use components [VisualStyle] -->
        <RequiredPlugin name="Sofa.GL.Component.Rendering3D"/> <!-- Needed to use components [OglModel] -->
        <RequiredPlugin name="InfinyToolkit" />
    </Node>

    <VisualStyle displayFlags="hideCollisionModels showVisual" />

    <DefaultAnimationLoop />
    <DefaultVisualManagerLoop />
    <CollisionPipeline verbose="0" />
    <BruteForceBroadPhase/>
    <BVHNarrowPhase/>
    <CollisionResponse response="PenalityContactForceField" />
    <MinProximityIntersection name="Proximity" alarmDistance="1.0" contactDistance="0.1" />

    <EulerImplicitSolver name="EulerImplicit"  rayleighStiffness="0.1" rayleighMass="0.1" />
    <CGLinearSolver name="CG Solver" iterations="25" tolerance="1e-9" threshold="1e-9"/>

    <AdvancedCarvingManager name="ACarving" active="1" refineDistance="1.0" carvingDistance="0.05"
        carvingWithBurning="1" process="1" drawContacts="0"/>

    <Node name="carvingElement">
        <MechanicalObject name="Particles" template="Rigid3d" position="5 12 5 0 0 0 1" />
        <UniformMass name="Mass" totalMass="10.0" template="Rigid3d"/>
        <SphereCollisionModel name="tool" radius="0.1" tags="CarvingTool" contactStiffness="10"/>
        <Node name="VisuTool" >
            <MeshOBJLoader name="meshLoader_1" filename="./mesh/sphere.obj" scale3d="0.1 0.1 0.1"/>
            <OglModel name="InstrumentVisualModel" src="@meshLoader_1" color="0.0 1.0 0.0 1.0" />
            <RigidMapping name="MM->VM mapping" input="@.." output="@InstrumentVisualModel" />
        </Node>
    </Node>

    <Node name="Hexa2Tetra">
        <RegularGridTopology name="HexaTop" n="11 11 11" min="0 0 0" max="10 10 10" />
        <Node name="TetraMesh">
            <TetrahedronSetTopologyContainer name="Container" position="@HexaTop.position" />
            <TetrahedronSetTopologyModifier name="Modifier"/>
            <Hexa2TetraTopologicalMapping input="@../HexaTop" output="@Container" swapping="false" />
        </Node>
    </Node>

    <Node name="Cube">
        <MechanicalObject position="@../Hexa2Tetra/TetraMesh/Container.position" name="Volume" />

        <TetrahedronSetTopologyContainer name="Tetra_topo" src="@../Hexa2Tetra/TetraMesh/Container" />
        <TetrahedronSetTopologyModifier name="Modifier" />
        <TetrahedronSetGeometryAlgorithms name="GeomAlgo" template="Vec3d" drawTetrahedra="0" drawScaleTetrahedra="0.8"/>

        <DiagonalMass massDensity="1.0" />

        <BoxROI name="box" box="-1 -1 -1 11 0 11" drawBoxes="true" />
        <FixedProjectiveConstraint  name="FixedConstraint" indices="@box.indices" activate_projectVelocity="1"/>

        <TetrahedralCorotationalFEMForceField name="CFEM" youngModulus="100" poissonRatio="0.3" method="large" />

        <Node name="Surface">
            <TriangleSetTopologyContainer  name="Container"/>
            <TriangleSetTopologyModifier   name="Modifier" />
            <TriangleSetGeometryAlgorithms name="GeomAlgo" template="Vec3d" drawTriangles="0"/>
            <Tetra2TriangleTopologicalMapping input="@../Tetra_topo" output="@Container" />

            <TriangleCollisionModel name="triangleCol" contactStiffness="10"/>
            <PointCollisionModel name="pointCol" contactStiffness="10" tags="CarvingSurface"/>

            <Node name="liver-Visual">
                <OglModel name="Visual" texcoords="@../../../ACarving.texcoords" texturename="textures/colorMap.png" />
                <IdentityMapping input="@../../Volume" output="@Visual" />
            </Node>
        </Node>
    </Node>
</Node>
